# OpenSim document version 40000
AnalyzeTool ACLR_SUBJECT03_FORCe:
  model_file: ACLR_SUBJECT03_FORCe_2.osim
  replace_force_set: false
  results_directory: C:\Users\psrit\Documents\projects\lasem-hip-test\hip-force-hop\
  output_precision: 8
  initial_time: 0
  final_time: 3
  solve_for_equilibrium_for_auxiliary_states: false
  maximum_number_of_integrator_steps: 20000
  maximum_integrator_step_size: 1
  minimum_integrator_step_size: 1e-8
  integrator_error_tolerance: 1e-5
  external_loads_file: ACLR_SUBJECT03_HOPP01_kinetics.xml
  coordinates_file: ACLR_SUBJECT03_HOPP01_ik.mot
  lowpass_cutoff_frequency_for_coordinates: 6
  AnalysisSet Analyses:
    JointReaction: start_time=0 end_time=3 step_interval=1 in_degrees=false
        forces_file=C:\Users\psrit\Documents\projects\lasem-hip-test\hip-force-hop\ACLR_SUBJECT03_HOPP01_SO_StaticOptimization_force.sto
        joint_names=ALL apply_on_bodies=child express_in_frame=parent
