# OpenSim document version 30000
Model ACLR_SUBJECT03_FORCe:
  length_units: meters
  force_units: N
  gravity: 0 -9.8066 0
  credits:
    Delp S.L., Loan J.P., Hoy M.G., Zajac F.E., Topp E.L., Rosen J.M., Thelen D.G., Anderson F.C., Seth A. Notes: 3D, 23 DOF gait model created by D.G. Thelen, Univ. of Wisconsin-Madison, and Ajay Seth, Frank C. Anderson, and Scott L. Delp, Stanford University. Lower extremity joint defintions based on Delp et al. (1990). Low back joint and anthropometry based on Anderson and Pandy (1999, 2001). Planar knee model of Yamaguchi and Zajac (1989). Seth replaced tibia translation constraints with a CustomJoint for the knee and removed the patella to eliminate all kinematic constraints; insertions of the quadrucepts are handled with moving points in the tibia frame as defined by Delp 1990. License: Creative Commons (CCBY 3.0). You are free to distribute, remix, tweak, and build upon this work, even commercially, as long as you credit us for the original creation. http://creativecommons.org/licenses/by/3.0/ More Information: http://simtk-confluence.stanford.edu:8080/display/OpenSim/Gait+2392+and+2354+Models
  publications:
    [all\max_contraction_velocity] (scale): 3 ;[all\max_isometric_force] (scale): 3 ;Delp, S.L., Loan, J.P., Hoy, M.G., Zajac, F.E., Topp E.L., Rosen, J.M.: An interactive graphics-based model of the lower extremity to study orthopaedic surgical procedures, IEEE Transactions on Biomedical Engineering, vol. 37, pp. 757-767, 1990. Yamaguchi G.T., Zajac F.E.: A planar model of the knee joint to characterize the knee extensor mechanism." J . Biomecl7. vol. 21. pp. 1-10. 1989. Anderson F.C., Pandy M.G.: A dynamic optimization solution for vertical jumping in three dimensions. Computer Methods in Biomechanics and Biomedical Engineering 2:201-231, 1999. Anderson F.C., Pandy M.G.: Dynamic optimization of human walking. Journal of Biomechanical Engineering 123:381-390, 2001.
  BodySet:
    Body ground: mass=0 mass_center=(0 0 0) inertia_xx=0 inertia_yy=0 inertia_zz=0
    Body pelvis: mass=10.82336 mass_center=(-0.0651048 0 0) inertia_xx=0.08011386 inertia_yy=0.06787857
        inertia_zz=0.04512249 meshes=(sacrum.vtp pelvis.vtp l_pelvis.vtp)
      CustomJoint ground_pelvis: parent_body=ground location_in_parent=(0 0 0) location=(0 0 0)
        Coordinate pelvis_tilt: motion_type=rotational default_value=0 range=(-1.5708 1.5708) clamped=false
        Coordinate pelvis_list: motion_type=rotational default_value=0 range=(-1.5708 1.5708) clamped=false
        Coordinate pelvis_rotation: motion_type=rotational default_value=0 range=(-1.5708 1.5708) clamped=false
        Coordinate pelvis_tx: motion_type=translational default_value=0 range=(-5 5) clamped=false
        Coordinate pelvis_ty: motion_type=translational default_value=0 range=(-1 2) clamped=false
        Coordinate pelvis_tz: motion_type=translational default_value=0 range=(-3 3) clamped=false
        SpatialTransform:
          TransformAxis rotation1: coordinates=pelvis_tilt axis=(0 0 1) LinearFunction(coefficients=1 0)
          TransformAxis rotation2: coordinates=pelvis_list axis=(1 0 0) LinearFunction(coefficients=1 0)
          TransformAxis rotation3: coordinates=pelvis_rotation axis=(0 1 0) LinearFunction(coefficients=1 0)
          TransformAxis translation1: coordinates=pelvis_tx axis=(1 0 0) LinearFunction(coefficients=1 0)
          TransformAxis translation2: coordinates=pelvis_ty axis=(0 1 0) LinearFunction(coefficients=1 0)
          TransformAxis translation3: coordinates=pelvis_tz axis=(0 0 1) LinearFunction(coefficients=1 0)
    Body femoral_epiphysis_r: mass=0 mass_center=(0 0 0) inertia_xx=0 inertia_yy=0 inertia_zz=0
      CustomJoint hip_r: parent_body=pelvis location_in_parent=(-0.0651048 -0.06086884 0.0768918) location=(0 0 0)
        Coordinate hip_flexion_r: motion_type=rotational default_value=0 range=(-2.0944 2.0944) clamped=false
        Coordinate hip_adduction_r: motion_type=rotational default_value=0 range=(-2.0944 2.0944) clamped=false
        Coordinate hip_rotation_r: motion_type=rotational default_value=0 range=(-2.0944 2.0944) clamped=false
        SpatialTransform: axes_held_at_zero=(translation1 translation2 translation3)
          TransformAxis rotation1: coordinates=hip_flexion_r axis=(0 0 1) LinearFunction(coefficients=1 0)
          TransformAxis rotation2: coordinates=hip_adduction_r axis=(1 0 0) LinearFunction(coefficients=1 0)
          TransformAxis rotation3: coordinates=hip_rotation_r axis=(0 1 0) LinearFunction(coefficients=1 0)
    Body femur_r: mass=8.54822 mass_center=(0 -0.169783 0) inertia_xx=0.1248437 inertia_yy=0.03637538
        inertia_zz=0.1248437 meshes=femur.vtp
      WeldJoint epiphyseal_line_r: parent_body=femoral_epiphysis_r location_in_parent=(0 -0.070711 0.070711)
          orientation_in_parent=(0.707106 0 0) location=(0 -0.070711 0.070711) orientation=(0.707106 0 0)
    Body tibia_r: mass=3.407286 mass_center=(0 -0.20005 0) inertia_xx=0.05301208 inertia_yy=0.005045679
        inertia_zz=0.05301208 meshes=(tibia.vtp fibula.vtp)
      CustomJoint knee_r: parent_body=femur_r location_in_parent=(0 0 0) location=(0 0 0)
        Coordinate knee_angle_r: motion_type=rotational default_value=0 range=(-2.0944 0.17453) clamped=false
        SpatialTransform: axes_held_at_zero=(rotation2 rotation3 translation3)
          TransformAxis rotation1: coordinates=knee_angle_r axis=(0 0 1) LinearFunction(coefficients=1 0)
          TransformAxis translation1: coordinates=knee_angle_r axis=(1 0 0)
            MultiplierFunction: scale=0.9987246
              SimmSpline: x=(-2.0944 -1.7453 -1.3963 -1.0472 -0.69813 -0.34907 -0.17453 0.19734 0.3374 0.49018 1.5215 2.0944)
                  y=(-0.0032 0.00179 0.00411 0.0041 0.00212 -0.001 -0.0031 -0.005227 -0.005435 -0.005574 -0.005435 -0.00525)
          TransformAxis translation2: coordinates=knee_angle_r axis=(0 1 0)
            MultiplierFunction: scale=0.9987246
              SimmSpline: x=(-2.0944 -1.2217 -0.5236 -0.34907 -0.17453 0.15915 2.0944)
                  y=(-0.4226 -0.4082 -0.399 -0.3976 -0.3966 -0.39526 -0.396)
    Body talus_r: mass=0.09190251 mass_center=(0 0 0) inertia_xx=0.0009893488 inertia_yy=0.001022253
        inertia_zz=0.001022253 meshes=talus.vtp
      CustomJoint ankle_r: parent_body=tibia_r location_in_parent=(0 -0.4607478 0) location=(0 0 0)
        Coordinate ankle_angle_r: motion_type=rotational default_value=0 range=(-1.5708 1.5708) clamped=false
        SpatialTransform: axes_held_at_zero=(rotation2 rotation3 translation1 translation2 translation3)
          TransformAxis rotation1: coordinates=ankle_angle_r axis=(-0.10501 -0.17402 0.97913)
              LinearFunction(coefficients=1 0)
    Body calcn_r: mass=1.148781 mass_center=(0.1 0.03 0) inertia_xx=0.001286635 inertia_yy=0.003584198
        inertia_zz=0.003768003 meshes=foot.vtp
      CustomJoint subtalar_r: parent_body=talus_r location_in_parent=(-0.05225737 -0.04494969 0.007957057)
          location=(0 0 0)
        Coordinate subtalar_angle_r: motion_type=rotational default_value=0 range=(-1.5708 1.5708) clamped=false
        SpatialTransform: axes_held_at_zero=(rotation2 rotation3 translation1 translation2 translation3)
          TransformAxis rotation1: coordinates=subtalar_angle_r axis=(0.78718 0.60475 -0.12095)
              LinearFunction(coefficients=1 0)
    Body toes_r: mass=0.1990608 mass_center=(0.0346 0.006 -0.0175) inertia_xx=9.190251e-5 inertia_yy=0.000183805
        inertia_zz=0.0009190251 meshes=bofoot.vtp
      CustomJoint mtp_r: parent_body=calcn_r location_in_parent=(0.1788 -0.002 0.00108) location=(0 0 0)
        Coordinate mtp_angle_r: motion_type=rotational default_value=0 range=(-1.5708 1.5708) clamped=false
        SpatialTransform: axes_held_at_zero=(rotation2 rotation3 translation1 translation2 translation3)
          TransformAxis rotation1: coordinates=mtp_angle_r axis=(-0.58095 0 0.81394) LinearFunction(coefficients=1 0)
    Body femoral_epiphysis_l: mass=8.54822 mass_center=(0 -0.169783 0) inertia_xx=0.1248437 inertia_yy=0.03637538
        inertia_zz=0.1248437
      CustomJoint hip_l: parent_body=pelvis location_in_parent=(-0.0651048 -0.06086884 -0.0768918) location=(0 0 0)
        Coordinate hip_flexion_l: motion_type=rotational default_value=0 range=(-2.0944 2.0944) clamped=false
        Coordinate hip_adduction_l: motion_type=rotational default_value=0 range=(-2.0944 2.0944) clamped=false
        Coordinate hip_rotation_l: motion_type=rotational default_value=0 range=(-2.0944 2.0944) clamped=false
        SpatialTransform: axes_held_at_zero=(translation1 translation2 translation3)
          TransformAxis rotation1: coordinates=hip_flexion_l axis=(0 0 1) LinearFunction(coefficients=1 0)
          TransformAxis rotation2: coordinates=hip_adduction_l axis=(-1 0 0) LinearFunction(coefficients=1 0)
          TransformAxis rotation3: coordinates=hip_rotation_l axis=(0 -1 0) LinearFunction(coefficients=1 0)
    Body femur_l: mass=8.54822 mass_center=(0 -0.169783 0) inertia_xx=0.1248437 inertia_yy=0.03637538
        inertia_zz=0.1248437 meshes=l_femur.vtp
      WeldJoint epiphyseal_line_l: parent_body=femoral_epiphysis_l location_in_parent=(0 -0.070711 -0.070711)
          orientation_in_parent=(-0.707106 0 0) location=(0 -0.070711 -0.070711) orientation=(-0.707106 0 0)
    Body tibia_l: mass=3.407286 mass_center=(0 -0.20005 0) inertia_xx=0.05301208 inertia_yy=0.005045679
        inertia_zz=0.05301208 meshes=(l_tibia.vtp l_fibula.vtp)
      CustomJoint knee_l: parent_body=femur_l location_in_parent=(0 0 0) location=(0 0 0)
        Coordinate knee_angle_l: motion_type=rotational default_value=0 range=(-2.0944 0.17453) clamped=false
        SpatialTransform: axes_held_at_zero=(rotation2 rotation3 translation3)
          TransformAxis rotation1: coordinates=knee_angle_l axis=(0 0 1) LinearFunction(coefficients=1 0)
          TransformAxis translation1: coordinates=knee_angle_l axis=(1 0 0)
            MultiplierFunction: scale=0.9987246
              SimmSpline: x=(-2.0944 -1.7453 -1.3963 -1.0472 -0.69813 -0.34907 -0.17453 0.19734 0.3374 0.49018 1.5215 2.0944)
                  y=(-0.0032 0.00179 0.00411 0.0041 0.00212 -0.001 -0.0031 -0.005227 -0.005435 -0.005574 -0.005435 -0.00525)
          TransformAxis translation2: coordinates=knee_angle_l axis=(0 1 0)
            MultiplierFunction: scale=0.9987246
              SimmSpline: x=(-2.0944 -1.2217 -0.5236 -0.34907 -0.17453 0.15915 2.0944)
                  y=(-0.4226 -0.4082 -0.399 -0.3976 -0.3966 -0.39526 -0.396)
    Body talus_l: mass=0.09190251 mass_center=(0 0 0) inertia_xx=0.0009893488 inertia_yy=0.001022253
        inertia_zz=0.001022253 meshes=l_talus.vtp
      CustomJoint ankle_l: parent_body=tibia_l location_in_parent=(0 -0.4607478 0) location=(0 0 0)
        Coordinate ankle_angle_l: motion_type=rotational default_value=0 range=(-1.0472 1.0472) clamped=false
        SpatialTransform: axes_held_at_zero=(rotation2 rotation3 translation1 translation2 translation3)
          TransformAxis rotation1: coordinates=ankle_angle_l axis=(0.10501 0.17402 0.97913)
              LinearFunction(coefficients=1 0)
    Body calcn_l: mass=1.148781 mass_center=(0.1 0.03 0) inertia_xx=0.001286635 inertia_yy=0.003584198
        inertia_zz=0.003768003 meshes=l_foot.vtp
      CustomJoint subtalar_l: parent_body=talus_l location_in_parent=(-0.05225737 -0.04494969 -0.007957057)
          location=(0 0 0)
        Coordinate subtalar_angle_l: motion_type=rotational default_value=0 range=(-1.5708 1.5708) clamped=false
        SpatialTransform: axes_held_at_zero=(rotation2 rotation3 translation1 translation2 translation3)
          TransformAxis rotation1: coordinates=subtalar_angle_l axis=(-0.78718 -0.60475 -0.12095)
              LinearFunction(coefficients=1 0)
    Body toes_l: mass=0.1990608 mass_center=(0.0346 0.006 0.0175) inertia_xx=9.190251e-5 inertia_yy=0.000183805
        inertia_zz=0.0009190251 meshes=l_bofoot.vtp
      CustomJoint mtp_l: parent_body=calcn_l location_in_parent=(0.1788 -0.002 -0.00108) location=(0 0 0)
        Coordinate mtp_angle_l: motion_type=rotational default_value=0 range=(-1.0472 1.0472) clamped=false
        SpatialTransform: axes_held_at_zero=(rotation2 rotation3 translation1 translation2 translation3)
          TransformAxis rotation1: coordinates=mtp_angle_l axis=(0.58095 0 0.81394) LinearFunction(coefficients=1 0)
    Body torso: mass=31.4643 mass_center=(-0.0295914 0.315642 0) inertia_xx=1.318443 inertia_yy=0.6755401
        inertia_zz=1.279905 meshes=(hat_spine.vtp hat_jaw.vtp hat_skull.vtp hat_ribs.vtp)
      CustomJoint back: parent_body=pelvis location_in_parent=(-0.09273059 0.07505008 0) location=(0 0 0)
        Coordinate lumbar_extension: motion_type=rotational default_value=0 range=(-1.5708 1.5708) clamped=false
        Coordinate lumbar_bending: motion_type=rotational default_value=0 range=(-1.5708 1.5708) clamped=false
        Coordinate lumbar_rotation: motion_type=rotational default_value=0 range=(-1.5708 1.5708) clamped=false
        SpatialTransform: axes_held_at_zero=(translation1 translation2 translation3)
          TransformAxis rotation1: coordinates=lumbar_extension axis=(0 0 1) LinearFunction(coefficients=1 0)
          TransformAxis rotation2: coordinates=lumbar_bending axis=(1 0 0) LinearFunction(coefficients=1 0)
          TransformAxis rotation3: coordinates=lumbar_rotation axis=(0 1 0) LinearFunction(coefficients=1 0)
  ForceSet:
    Thelen2003Muscle [values shared by the 92 below unless stated]: min_control=0 max_control=1 optimal_force=1
        max_contraction_velocity=30 activation_time_constant=0.01 deactivation_time_constant=0.04
        FmaxTendonStrain=0.033 FmaxMuscleStrain=0.6 KshapeActive=0.5 KshapePassive=4 Af=0.3 Flen=1.8
    Thelen2003Muscle glut_med1_r: max_isometric_force=2457 optimal_fiber_length=0.0509471
        tendon_slack_length=0.07427801 pennation_angle_at_optimal=0.13963 [radians]
      PathPoint P1: pelvis (-0.0375711 0.0279941 0.111332)
      PathPoint P2: femur_r (-0.0217722 -0.0116851 0.0626643)
    Thelen2003Muscle glut_med2_r: max_isometric_force=1719 optimal_fiber_length=0.08162659
        tendon_slack_length=0.05119775 pennation_angle_at_optimal=0
      PathPoint P1: pelvis (-0.0787335 0.0409783 0.0705379)
      PathPoint P2: femur_r (-0.0257671 -0.0057926 0.0595029)
    Thelen2003Muscle glut_med3_r: max_isometric_force=1959 optimal_fiber_length=0.06367982
        tendon_slack_length=0.05224506 pennation_angle_at_optimal=0.33161
      PathPoint P1: pelvis (-0.112621 0.00966903 0.0596717)
      PathPoint P2: femur_r (-0.0308606 -0.00469401 0.0584867)
    Thelen2003Muscle glut_min1_r: max_isometric_force=810 optimal_fiber_length=0.06781698
        tendon_slack_length=0.01595694 pennation_angle_at_optimal=0.17453
      PathPoint P1: pelvis (-0.0430042 -0.00736688 0.0972428)
      PathPoint P2: femur_r (-0.00719082 -0.0103867 0.0632289)
    Thelen2003Muscle glut_min2_r: max_isometric_force=855 optimal_fiber_length=0.05639137
        tendon_slack_length=0.02618171 pennation_angle_at_optimal=0
      PathPoint P1: pelvis (-0.0582904 -0.00598559 0.0912572)
      PathPoint P2: femur_r (-0.00958776 -0.0103867 0.0632289)
    Thelen2003Muscle glut_min3_r: max_isometric_force=969 optimal_fiber_length=0.03850902
        tendon_slack_length=0.05168316 pennation_angle_at_optimal=0.017453
      PathPoint P1: pelvis (-0.0767997 -0.00580142 0.0788256)
      PathPoint P2: femur_r (-0.0134828 -0.00828941 0.0620998)
    Thelen2003Muscle semimem_r: max_isometric_force=3864 optimal_fiber_length=0.08105571 tendon_slack_length=0.3637375
        pennation_angle_at_optimal=0.2618
      PathPoint P1: pelvis (-0.109767 -0.0897562 0.0658507)
      ConditionalPathPoint P2: tibia_r (-0.0372884 -0.0377063 -0.0189985) range=(-0.55851 0.17453)
          coordinate=knee_angle_r
      PathPoint P3: tibia_r (-0.0289307 -0.0511216 -0.0196616)
    Thelen2003Muscle semiten_r: max_isometric_force=1230 optimal_fiber_length=0.2056547 tendon_slack_length=0.2614168
        pennation_angle_at_optimal=0.087266
      PathPoint P1: pelvis (-0.116351 -0.101184 0.0556107)
      ConditionalPathPoint P2: tibia_r (-0.0450354 -0.0306344 -0.0228765) range=(-0.33161 0.17453)
          coordinate=knee_angle_r
      PathPoint P3: tibia_r (-0.0355954 -0.056597 -0.0229871)
      PathPoint P4: tibia_r (-0.012108 -0.0799344 -0.0246146)
      PathPoint P5: tibia_r (0.00289307 -0.102436 -0.0193903)
    Thelen2003Muscle bifemlh_r: max_isometric_force=2688 optimal_fiber_length=0.1105647 tendon_slack_length=0.3306797
        pennation_angle_at_optimal=0
      PathPoint P1: pelvis (-0.115992 -0.0944526 0.0639445)
      PathPoint P2: tibia_r (-0.0322523 -0.0385742 0.0295677)
      PathPoint P3: tibia_r (-0.0250732 -0.0603258 0.0344605)
    Thelen2003Muscle bifemsh_r: max_isometric_force=2412 optimal_fiber_length=0.1758977 tendon_slack_length=0.0904907
        pennation_angle_at_optimal=0.40143
      PathPoint P1: femur_r (0.00499362 -0.210831 0.0264206)
      PathPoint P2: tibia_r (-0.0322523 -0.0385742 0.0295677)
      PathPoint P3: tibia_r (-0.0250732 -0.0603258 0.0344605)
    Thelen2003Muscle sar_r: max_isometric_force=468 optimal_fiber_length=0.5211397 tendon_slack_length=0.1002192
        pennation_angle_at_optimal=0
      PathPoint P1: pelvis (-0.0140892 -0.00119712 0.114371)
      PathPoint P2: femur_r (-0.00299617 -0.356345 -0.0475345)
      PathPoint P3: tibia_r (-0.00600044 -0.0448961 -0.0400867)
      PathPoint P4: tibia_r (0.00642904 -0.0631117 -0.0384792)
      PathPoint P5: tibia_r (0.0260376 -0.0900065 -0.0253179)
    Thelen2003Muscle add_long_r: max_isometric_force=1881 optimal_fiber_length=0.1377521 tendon_slack_length=0.1098024
        pennation_angle_at_optimal=0.10472
      PathPoint P1: pelvis (-0.0290992 -0.0769839 0.0155625)
      PathPoint P2: femur_r (0.00499362 -0.210831 0.0264206)
    Thelen2003Muscle add_brev_r: max_isometric_force=1287 optimal_fiber_length=0.1331566 tendon_slack_length=0.02002355
        pennation_angle_at_optimal=0
      PathPoint P1: pelvis (-0.0540545 -0.0842587 0.0151021)
      PathPoint P2: femur_r (0.000898852 -0.119447 0.0331951)
    Thelen2003Muscle add_mag1_r: max_isometric_force=1143 optimal_fiber_length=0.08868799
        tendon_slack_length=0.06116413 pennation_angle_at_optimal=0.087266
      PathPoint P1: pelvis (-0.0674069 -0.108109 0.0234819)
      PathPoint P2: femur_r (-0.00449426 -0.120946 0.038276)
    Thelen2003Muscle add_mag2_r: max_isometric_force=1029 optimal_fiber_length=0.1229061 tendon_slack_length=0.1218904
        pennation_angle_at_optimal=0.05236
      PathPoint P1: pelvis (-0.0765235 -0.109767 0.0283625)
      PathPoint P2: femur_r (0.00539311 -0.228209 0.0256303)
    Thelen2003Muscle add_mag3_r: max_isometric_force=1464 optimal_fiber_length=0.1320661 tendon_slack_length=0.2510265
        pennation_angle_at_optimal=0.087266
      PathPoint P1: pelvis (-0.102289 -0.105098 0.0449564)
      PathPoint P2: femur_r (0.00699107 -0.383211 -0.0300337)
    Thelen2003Muscle tfl_r: max_isometric_force=699 optimal_fiber_length=0.09472209 tendon_slack_length=0.4237567
        pennation_angle_at_optimal=0.05236
      PathPoint P1: pelvis (-0.0286387 0.0197064 0.114279)
      PathPoint P2: femur_r (0.0293625 -0.0993731 0.0674065)
      PathPoint P3: femur_r (0.00539311 -0.404384 0.0403084)
      PathPoint P4: tibia_r (0.00642904 -0.0521824 0.029839)
    Thelen2003Muscle pect_r: max_isometric_force=798 optimal_fiber_length=0.09983874 tendon_slack_length=0.03294678
        pennation_angle_at_optimal=0
      PathPoint P1: pelvis (-0.0396891 -0.070722 0.0415308)
      PathPoint P2: femur_r (-0.0121844 -0.0820952 0.0285659)
    Thelen2003Muscle grac_r: max_isometric_force=486 optimal_fiber_length=0.3601486 tendon_slack_length=0.1289168
        pennation_angle_at_optimal=0.05236
      PathPoint P1: pelvis (-0.0681528 -0.109306 0.0257288)
      ConditionalPathPoint P2: tibia_r (-0.0284699 -0.0341811 -0.0379166) range=(-0.43633 0.17453)
          coordinate=knee_angle_r
      PathPoint P3: tibia_r (-0.0208194 -0.0552147 -0.0359675)
      PathPoint P4: tibia_r (0.00642904 -0.0895779 -0.0229067)
    Thelen2003Muscle glut_max1_r: max_isometric_force=1719 optimal_fiber_length=0.1361808 tendon_slack_length=0.1198774
        pennation_angle_at_optimal=0.087266
      PathPoint P1: pelvis (-0.110043 0.0563566 0.0644602)
      PathPoint P2: pelvis (-0.118883 0.00110503 0.0815882)
      PathPoint P3: femur_r (-0.0456417 -0.0247684 0.0442602)
      PathPoint P4: femur_r (-0.0276647 -0.0565278 0.0530671)
    Thelen2003Muscle glut_max2_r: max_isometric_force=2457 optimal_fiber_length=0.1420503 tendon_slack_length=0.1227237
        pennation_angle_at_optimal=0
      PathPoint P1: pelvis (-0.124224 0.0162071 0.0518444)
      PathPoint P2: pelvis (-0.12671 -0.0478847 0.0841666)
      PathPoint P3: femur_r (-0.0425457 -0.0529324 0.0330822)
      PathPoint P4: femur_r (-0.0155801 -0.10147 0.0473087)
    Thelen2003Muscle glut_max3_r: max_isometric_force=1656 optimal_fiber_length=0.1399013 tendon_slack_length=0.1408729
        pennation_angle_at_optimal=0.087266
      PathPoint P1: pelvis (-0.143286 -0.028915 0.00534099)
      PathPoint P2: pelvis (-0.140799 -0.0968745 0.0371107)
      PathPoint P3: femur_r (-0.0298619 -0.103967 0.0152427)
      PathPoint P4: femur_r (-0.00599235 -0.141719 0.0464055)
    Thelen2003Muscle iliacus_r: max_isometric_force=3219 optimal_fiber_length=0.09462002 tendon_slack_length=0.09462002
        pennation_angle_at_optimal=0.12217
      PathPoint P1: pelvis (-0.062066 0.0336114 0.0786414)
      PathPoint P2: pelvis (-0.0237582 -0.0506473 0.0746817)
      ConditionalPathPoint P3: pelvis (-0.0265208 -0.0741292 0.0751422) range=(-1.5708 0.7854) coordinate=hip_flexion_r
      PathPoint P4: femur_r (0.00169783 -0.0542307 0.00643579)
      PathPoint P5: femur_r (-0.0192754 -0.0620208 0.0145652)
    Thelen2003Muscle psoas_r: max_isometric_force=3339 optimal_fiber_length=0.09391633 tendon_slack_length=0.1502661
        pennation_angle_at_optimal=0.13963
      PathPoint P1: pelvis (-0.0595796 0.0816803 0.0266129)
      PathPoint P2: pelvis (-0.0219165 -0.052489 0.0698933)
      ConditionalPathPoint P3: pelvis (-0.0265208 -0.0741292 0.0751422) range=(-1.5708 0.7854) coordinate=hip_flexion_r
      PathPoint P4: femur_r (0.00159796 -0.0506353 0.00429053)
      PathPoint P5: femur_r (-0.018776 -0.0596239 0.0117425)
    Thelen2003Muscle quad_fem_r: max_isometric_force=1143 optimal_fiber_length=0.05509014
        tendon_slack_length=0.02448451 pennation_angle_at_optimal=0
      PathPoint P1: pelvis (-0.105254 -0.105991 0.0478847)
      PathPoint P2: femur_r (-0.0380514 -0.0358542 0.0413246)
    Thelen2003Muscle gem_r: max_isometric_force=492 optimal_fiber_length=0.02499369 tendon_slack_length=0.04061474
        pennation_angle_at_optimal=0
      PathPoint P1: pelvis (-0.104333 -0.0755105 0.0657494)
      PathPoint P2: femur_r (-0.0141819 -0.00329579 0.0500185)
    Thelen2003Muscle peri_r: max_isometric_force=1332 optimal_fiber_length=0.0252318 tendon_slack_length=0.1116022
        pennation_angle_at_optimal=0.17453
      PathPoint P1: pelvis (-0.128552 0.000276258 0.0216402)
      PathPoint P2: pelvis (-0.109859 -0.0254157 0.0605005)
      PathPoint P3: femur_r (-0.0147811 -0.00359541 0.0493411)
    Thelen2003Muscle rect_fem_r: max_isometric_force=3507 optimal_fiber_length=0.1127713 tendon_slack_length=0.3066589
        pennation_angle_at_optimal=0.087266
      PathPoint P1: pelvis (-0.0271654 -0.0286387 0.0891392)
      ConditionalPathPoint P2: femur_r (0.0333574 -0.402486 0.00214526) range=(-2.618 -1.46) coordinate=knee_angle_r
      MovingPathPoint P3: tibia_r (0.0661741 0.0224845 0.00140655) x_coordinate=knee_angle_r y_coordinate=knee_angle_r
          z_coordinate=knee_angle_r
        x_location: MultiplierFunction: scale=1.071506
          SimmSpline: x=(-2.0944 -2 -1.5708 -1.4575 -1.3963 -1.0472 -0.69813 -0.52639 -0.34907 -0.17453 0 0.00017453 0.00034907 0.027925 0.087266 0.17453 2.0944)
              y=(0.015581 0.017994 0.027508 0.029656 0.030762 0.036569 0.042207 0.04509 0.048391 0.05343 0.061758 0.061767 0.061776 0.063308 0.066994 0.073303 0.057348)
        y_location: MultiplierFunction: scale=1.071506
          SimmSpline: x=(-2.0944 -2 -1.5708 -1.4575 -1.3963 -1.0472 -0.69813 -0.52639 -0.34907 -0.17453 0 0.00017453 0.00034907 0.027925 0.087266 0.17453 2.0944)
              y=(0.023412 0.023761 0.025114 0.02528 0.025315 0.024918 0.024237 0.023845 0.02342 0.022764 0.020984 0.020981 0.020979 0.020522 0.019175 0.015955 -0.067377)
        z_location: MultiplierFunction: scale=1.004679
          SimmSpline: x=(-2.0944 0.1745) y=(0.0014 0.0014)
    Thelen2003Muscle vas_med_r: max_isometric_force=3882 optimal_fiber_length=0.0888023 tendon_slack_length=0.1257201
        pennation_angle_at_optimal=0.087266
      PathPoint P1: femur_r (0.0139821 -0.209632 0.0212268)
      PathPoint P2: femur_r (0.0355546 -0.276547 0.00101618)
      ConditionalPathPoint P3: femur_r (0.0369528 -0.404284 -0.0141136) range=(-2.618 -1.21) coordinate=knee_angle_r
      ConditionalPathPoint P4: femur_r (0.0273651 -0.424957 -0.014791) range=(-2.618 -1.7801) coordinate=knee_angle_r
      MovingPathPoint P5: tibia_r (0.0599604 0.0233503 -0.0146683) x_coordinate=knee_angle_r y_coordinate=knee_angle_r
          z_coordinate=knee_angle_r
        x_location: MultiplierFunction: scale=1.071506
          SimmSpline: x=(-2.0944 -2 -1.5708 -1.4575 -1.3963 -1.0472 -0.69813 -0.52639 -0.34907 -0.17453 0 0.00017453 0.00034907 0.027925 0.087266 0.17453 2.0944)
              y=(0.009811 0.012224 0.021737 0.023885 0.02499 0.030796 0.036419 0.039287 0.042565 0.047576 0.055959 0.055968 0.055978 0.057542 0.061337 0.06795 0.062933)
        y_location: MultiplierFunction: scale=1.071506
          SimmSpline: x=(-2.0944 -2 -1.5708 -1.4575 -1.3963 -1.0472 -0.69813 -0.52639 -0.34907 -0.17453 0 0.00017453 0.00034907 0.027925 0.087266 0.17453 2.0944)
              y=(0.022415 0.022765 0.024126 0.024293 0.024329 0.023946 0.023359 0.023068 0.022834 0.022636 0.021792 0.02179 0.021789 0.021537 0.020684 0.018327 -0.06562)
        z_location: MultiplierFunction: scale=1.004679
          SimmSpline: x=(-2.0944 2.0944) y=(-0.0146 -0.0146)
    Thelen2003Muscle vas_int_r: max_isometric_force=4095 optimal_fiber_length=0.08658817 tendon_slack_length=0.1353562
        pennation_angle_at_optimal=0.05236
      PathPoint P1: femur_r (0.028963 -0.192155 0.0350017)
      PathPoint P2: femur_r (0.0334573 -0.208134 0.032179)
      ConditionalPathPoint P3: femur_r (0.0342563 -0.402486 0.00620998) range=(-2.618 -1.42) coordinate=knee_angle_r
      MovingPathPoint P4: tibia_r (0.059429 0.0271005 0.00180842) x_coordinate=knee_angle_r y_coordinate=knee_angle_r
          z_coordinate=knee_angle_r
        x_location: MultiplierFunction: scale=1.071506
          SimmSpline: x=(-2.0944 -2 -1.5708 -1.4575 -1.3963 -1.0472 -0.69813 -0.52639 -0.34907 -0.17453 0 0.00017453 0.00034907 0.027925 0.087266 0.17453 2.0944)
              y=(0.0082733 0.010687 0.020204 0.022353 0.023458 0.029271 0.034946 0.037871 0.041257 0.046529 0.055463 0.055474 0.055484 0.057172 0.061272 0.068437 0.064882)
        y_location: MultiplierFunction: scale=1.071506
          SimmSpline: x=(-2.0944 -2 -1.5708 -1.4575 -1.3963 -1.0472 -0.69813 -0.52639 -0.34907 -0.17453 0 0.00017453 0.00034907 0.027925 0.087266 0.17453 2.0944)
              y=(0.025599 0.025949 0.027312 0.02748 0.027515 0.027136 0.026574 0.026307 0.026119 0.026013 0.025292 0.025291 0.02529 0.025053 0.024219 0.021829 -0.068571)
        z_location: MultiplierFunction: scale=1.004679
          SimmSpline: x=(-2.0944 2.0944) y=(0.0018 0.0018)
    Thelen2003Muscle vas_lat_r: max_isometric_force=5613 optimal_fiber_length=0.08429256 tendon_slack_length=0.1575468
        pennation_angle_at_optimal=0.087266
      PathPoint P1: femur_r (0.00479388 -0.185164 0.0394051)
      PathPoint P2: femur_r (0.0268657 -0.25877 0.0461796)
      ConditionalPathPoint P3: femur_r (0.036054 -0.402486 0.0231463) range=(-2.618 -1.21) coordinate=knee_angle_r
      ConditionalPathPoint P4: femur_r (0.0252677 -0.423759 0.0207752) range=(-2.618 -1.92) coordinate=knee_angle_r
      MovingPathPoint P5: tibia_r (0.0642432 0.0209865 0.0165772) x_coordinate=knee_angle_r y_coordinate=knee_angle_r
          z_coordinate=knee_angle_r
        x_location: MultiplierFunction: scale=1.071506
          SimmSpline: x=(-2.0944 -2 -1.5708 -1.4575 -1.3963 -1.0472 -0.69813 -0.52639 -0.34907 -0.17453 0 0.00017453 0.00034907 0.027925 0.087266 0.17453 2.0944)
              y=(0.01429 0.016703 0.026215 0.028362 0.029467 0.035271 0.040878 0.043729 0.04697 0.051874 0.059956 0.059965 0.059974 0.061458 0.065035 0.071187 0.058377)
        y_location: MultiplierFunction: scale=1.071506
          SimmSpline: x=(-2.0944 -2 -1.5708 -1.4575 -1.3963 -1.0472 -0.69813 -0.52639 -0.34907 -0.17453 0 0.00017453 0.00034907 0.027925 0.087266 0.17453 2.0944)
              y=(0.021532 0.021882 0.023236 0.023402 0.023437 0.023044 0.022384 0.022015 0.021636 0.021097 0.019586 0.019584 0.019582 0.01919 0.018008 0.015107 -0.065342)
        z_location: MultiplierFunction: scale=1.004679
          SimmSpline: x=(-2.0944 2.0944) y=(0.0165 0.0165)
    Thelen2003Muscle med_gas_r: max_isometric_force=4674 optimal_fiber_length=0.06453676 tendon_slack_length=0.419489
        pennation_angle_at_optimal=0.29671
      PathPoint P1: femur_r (-0.0189758 -0.392399 -0.0265335)
      ConditionalPathPoint P2: femur_r (-0.0299617 -0.401687 -0.0291304) range=(-0.7854 0.17453)
          coordinate=knee_angle_r
      PathPoint P3: calcn_r (0 0.031 -0.0053)
    Thelen2003Muscle lat_gas_r: max_isometric_force=2049 optimal_fiber_length=0.06887186 tendon_slack_length=0.4089267
        pennation_angle_at_optimal=0.13963
      PathPoint P1: femur_r (-0.0219719 -0.394097 0.0307112)
      ConditionalPathPoint P2: femur_r (-0.0299617 -0.401288 0.030937) range=(-0.7854 0.17453) coordinate=knee_angle_r
      PathPoint P3: calcn_r (0 0.031 -0.0053)
    Thelen2003Muscle soleus_r: max_isometric_force=10647 optimal_fiber_length=0.05395 tendon_slack_length=0.26975
        pennation_angle_at_optimal=0.43633
      PathPoint P1: tibia_r (-0.00257162 -0.164262 0.00713322)
      PathPoint P2: calcn_r (0 0.031 -0.0053)
    Thelen2003Muscle tib_post_r: max_isometric_force=4764 optimal_fiber_length=0.03311486 tendon_slack_length=0.3311486
        pennation_angle_at_optimal=0.20944
      PathPoint P1: tibia_r (-0.0100722 -0.144439 0.00190889)
      PathPoint P2: tibia_r (-0.0154297 -0.434067 -0.0230071)
      PathPoint P3: calcn_r (0.0417 0.0334 -0.0286)
      PathPoint P4: calcn_r (0.0772 0.0159 -0.0281)
    Thelen2003Muscle flex_dig_r: max_isometric_force=930 optimal_fiber_length=0.03544292 tendon_slack_length=0.4169755
        pennation_angle_at_optimal=0.12217
      PathPoint P1: tibia_r (-0.0088935 -0.21923 -0.00180842)
      PathPoint P2: tibia_r (-0.0165012 -0.434067 -0.0196917)
      PathPoint P3: calcn_r (0.0436 0.0315 -0.028)
      PathPoint P4: calcn_r (0.0708 0.0176 -0.0263)
      PathPoint P5: calcn_r (0.1658 -0.0081 0.0116)
      PathPoint P6: toes_r (-0.0019 -0.0078 0.0147)
      PathPoint P7: toes_r (0.0285 -0.0071 0.0215)
      PathPoint P8: toes_r (0.0441 -0.006 0.0242)
    Thelen2003Muscle flex_hal_r: max_isometric_force=966 optimal_fiber_length=0.04467937 tendon_slack_length=0.394841
        pennation_angle_at_optimal=0.17453
      PathPoint P1: tibia_r (-0.0084649 -0.25009 0.0245142)
      PathPoint P2: tibia_r (-0.01993 -0.437067 -0.0174814)
      PathPoint P3: calcn_r (0.0374 0.0276 -0.0241)
      PathPoint P4: calcn_r (0.1038 0.0068 -0.0256)
      PathPoint P5: calcn_r (0.1726 -0.0053 -0.0269)
      PathPoint P6: toes_r (0.0155 -0.0064 -0.0265)
      PathPoint P7: toes_r (0.0562 -0.0102 -0.0181)
    Thelen2003Muscle tib_ant_r: max_isometric_force=2715 optimal_fiber_length=0.1040474 tendon_slack_length=0.2367609
        pennation_angle_at_optimal=0.087266
      PathPoint P1: tibia_r (0.01918 -0.174013 0.0115538)
      PathPoint P2: tibia_r (0.0352526 -0.423352 -0.0177828)
      PathPoint P3: calcn_r (0.1166 0.0178 -0.0305)
    Thelen2003Muscle per_brev_r: max_isometric_force=1305 optimal_fiber_length=0.05308952 tendon_slack_length=0.1709482
        pennation_angle_at_optimal=0.087266
      PathPoint P1: tibia_r (-0.00750054 -0.283521 0.0326521)
      PathPoint P2: tibia_r (-0.0212158 -0.448318 0.0284324)
      PathPoint P3: tibia_r (-0.0154297 -0.460212 0.0290352)
      PathPoint P4: calcn_r (0.0471 0.027 0.0233)
      PathPoint P5: calcn_r (0.0677 0.0219 0.0343)
    Thelen2003Muscle per_long_r: max_isometric_force=2829 optimal_fiber_length=0.05162157 tendon_slack_length=0.363458
        pennation_angle_at_optimal=0.17453
      PathPoint P1: tibia_r (0.000535753 -0.168012 0.0363694)
      PathPoint P2: tibia_r (-0.0221802 -0.450568 0.0287338)
      PathPoint P3: tibia_r (-0.0173584 -0.462784 0.0290352)
      PathPoint P4: calcn_r (0.0438 0.023 0.0221)
      PathPoint P5: calcn_r (0.0681 0.0106 0.0284)
      PathPoint P6: calcn_r (0.0852 0.0069 0.0118)
      PathPoint P7: calcn_r (0.1203 0.0085 -0.0184)
    Thelen2003Muscle per_tert_r: max_isometric_force=540 optimal_fiber_length=0.08434704 tendon_slack_length=0.1067684
        pennation_angle_at_optimal=0.22689
      PathPoint P1: tibia_r (0.00107151 -0.30045 0.0232081)
      PathPoint P2: tibia_r (0.0245375 -0.435996 0.0159744)
      PathPoint P3: calcn_r (0.0857 0.0228 0.0299)
    Thelen2003Muscle ext_dig_r: max_isometric_force=1536 optimal_fiber_length=0.1070506 tendon_slack_length=0.362083
        pennation_angle_at_optimal=0.13963
      PathPoint P1: tibia_r (0.00342882 -0.147975 0.0277291)
      PathPoint P2: tibia_r (0.0309665 -0.429353 0.00723369)
      PathPoint P3: calcn_r (0.0922 0.0388 -0.0001)
      PathPoint P4: calcn_r (0.1616 0.0055 0.013)
      PathPoint P5: toes_r (0.0003 0.0047 0.0153)
      PathPoint P6: toes_r (0.0443 -0.0004 0.025)
    Thelen2003Muscle ext_hal_r: max_isometric_force=486 optimal_fiber_length=0.1161281 tendon_slack_length=0.3190908
        pennation_angle_at_optimal=0.10472
      PathPoint P1: tibia_r (0.00128581 -0.189335 0.0229067)
      PathPoint P2: tibia_r (0.0349311 -0.426995 -0.00853977)
      PathPoint P3: calcn_r (0.097 0.0389 -0.0211)
      PathPoint P4: calcn_r (0.1293 0.0309 -0.0257)
      PathPoint P5: calcn_r (0.1734 0.0139 -0.028)
      PathPoint P6: toes_r (0.0298 0.0041 -0.0245)
      PathPoint P7: toes_r (0.0563 0.0034 -0.0186)
    Thelen2003Muscle glut_med1_l: max_isometric_force=2457 optimal_fiber_length=0.0509471
        tendon_slack_length=0.07427801 pennation_angle_at_optimal=0.13963
      PathPoint P1: pelvis (-0.0375711 0.0279941 -0.111332)
      PathPoint P2: femur_l (-0.0217722 -0.0116851 -0.0626643)
    Thelen2003Muscle glut_med2_l: max_isometric_force=1719 optimal_fiber_length=0.08162659
        tendon_slack_length=0.05119775 pennation_angle_at_optimal=0
      PathPoint P1: pelvis (-0.0787335 0.0409783 -0.0705379)
      PathPoint P2: femur_l (-0.0257671 -0.0057926 -0.0595029)
    Thelen2003Muscle glut_med3_l: max_isometric_force=1959 optimal_fiber_length=0.06367982
        tendon_slack_length=0.05224506 pennation_angle_at_optimal=0.33161
      PathPoint P1: pelvis (-0.112621 0.00966903 -0.0596717)
      PathPoint P2: femur_l (-0.0308606 -0.00469401 -0.0584867)
    Thelen2003Muscle glut_min1_l: max_isometric_force=810 optimal_fiber_length=0.06781698
        tendon_slack_length=0.01595694 pennation_angle_at_optimal=0.17453
      PathPoint P1: pelvis (-0.0430042 -0.00736688 -0.0972428)
      PathPoint P2: femur_l (-0.00719082 -0.0103867 -0.0632289)
    Thelen2003Muscle glut_min2_l: max_isometric_force=855 optimal_fiber_length=0.05639137
        tendon_slack_length=0.02618171 pennation_angle_at_optimal=0
      PathPoint P1: pelvis (-0.0582904 -0.00598559 -0.0912572)
      PathPoint P2: femur_l (-0.00958776 -0.0103867 -0.0632289)
    Thelen2003Muscle glut_min3_l: max_isometric_force=969 optimal_fiber_length=0.03850902
        tendon_slack_length=0.05168316 pennation_angle_at_optimal=0.017453
      PathPoint P1: pelvis (-0.0767997 -0.00580142 -0.0788256)
      PathPoint P2: femur_l (-0.0134828 -0.00828941 -0.0620998)
    Thelen2003Muscle semimem_l: max_isometric_force=3864 optimal_fiber_length=0.08105571 tendon_slack_length=0.3637375
        pennation_angle_at_optimal=0.2618
      PathPoint P1: pelvis (-0.109767 -0.0897562 -0.0658507)
      ConditionalPathPoint P2: tibia_l (-0.0372884 -0.0377063 0.0189985) range=(-0.55851 0.17453)
          coordinate=knee_angle_l
      PathPoint P3: tibia_l (-0.0289307 -0.0511216 0.0196616)
    Thelen2003Muscle semiten_l: max_isometric_force=1230 optimal_fiber_length=0.2056547 tendon_slack_length=0.2614168
        pennation_angle_at_optimal=0.087266
      PathPoint P1: pelvis (-0.116351 -0.101184 -0.0556107)
      ConditionalPathPoint P2: tibia_l (-0.0450354 -0.0306344 0.0228765) range=(-0.33161 0.17453)
          coordinate=knee_angle_l
      PathPoint P3: tibia_l (-0.0355954 -0.056597 0.0229871)
      PathPoint P4: tibia_l (-0.012108 -0.0799344 0.0246146)
      PathPoint P5: tibia_l (0.00289307 -0.102436 0.0193903)
    Thelen2003Muscle bifemlh_l: max_isometric_force=2688 optimal_fiber_length=0.1105647 tendon_slack_length=0.3306797
        pennation_angle_at_optimal=0
      PathPoint P1: pelvis (-0.115992 -0.0944526 -0.0639445)
      PathPoint P2: tibia_l (-0.0322523 -0.0385742 -0.0295677)
      PathPoint P3: tibia_l (-0.0250732 -0.0603258 -0.0344605)
    Thelen2003Muscle bifemsh_l: max_isometric_force=2412 optimal_fiber_length=0.1758977 tendon_slack_length=0.0904907
        pennation_angle_at_optimal=0.40143
      PathPoint P1: femur_l (0.00499362 -0.210831 -0.0264206)
      PathPoint P2: tibia_l (-0.0322523 -0.0385742 -0.0295677)
      PathPoint P3: tibia_l (-0.0250732 -0.0603258 -0.0344605)
    Thelen2003Muscle sar_l: max_isometric_force=468 optimal_fiber_length=0.5211397 tendon_slack_length=0.1002192
        pennation_angle_at_optimal=0
      PathPoint P1: pelvis (-0.0140892 -0.00119712 -0.114371)
      PathPoint P2: femur_l (-0.00299617 -0.356345 0.0475345)
      PathPoint P3: tibia_l (-0.00600044 -0.0448961 0.0400867)
      PathPoint P4: tibia_l (0.00642904 -0.0631117 0.0384792)
      PathPoint P5: tibia_l (0.0260376 -0.0900065 0.0253179)
    Thelen2003Muscle add_long_l: max_isometric_force=1881 optimal_fiber_length=0.1377521 tendon_slack_length=0.1098024
        pennation_angle_at_optimal=0.10472
      PathPoint P1: pelvis (-0.0290992 -0.0769839 -0.0155625)
      PathPoint P2: femur_l (0.00499362 -0.210831 -0.0264206)
    Thelen2003Muscle add_brev_l: max_isometric_force=1287 optimal_fiber_length=0.1331566 tendon_slack_length=0.02002355
        pennation_angle_at_optimal=0
      PathPoint P1: pelvis (-0.0540545 -0.0842587 -0.0151021)
      PathPoint P2: femur_l (0.000898852 -0.119447 -0.0331951)
    Thelen2003Muscle add_mag1_l: max_isometric_force=1143 optimal_fiber_length=0.08868799
        tendon_slack_length=0.06116413 pennation_angle_at_optimal=0.087266
      PathPoint P1: pelvis (-0.0674069 -0.108109 -0.0234819)
      PathPoint P2: femur_l (-0.00449426 -0.120946 -0.038276)
    Thelen2003Muscle add_mag2_l: max_isometric_force=1029 optimal_fiber_length=0.1229061 tendon_slack_length=0.1218904
        pennation_angle_at_optimal=0.05236
      PathPoint P1: pelvis (-0.0765235 -0.109767 -0.0283625)
      PathPoint P2: femur_l (0.00539311 -0.228209 -0.0256303)
    Thelen2003Muscle add_mag3_l: max_isometric_force=1464 optimal_fiber_length=0.1320661 tendon_slack_length=0.2510265
        pennation_angle_at_optimal=0.087266
      PathPoint P1: pelvis (-0.102289 -0.105098 -0.0449564)
      PathPoint P2: femur_l (0.00699107 -0.383211 0.0300337)
    Thelen2003Muscle tfl_l: max_isometric_force=699 optimal_fiber_length=0.09472209 tendon_slack_length=0.4237567
        pennation_angle_at_optimal=0.05236
      PathPoint P1: pelvis (-0.0286387 0.0197064 -0.114279)
      PathPoint P2: femur_l (0.0293625 -0.0993731 -0.0674065)
      PathPoint P3: femur_l (0.00539311 -0.404384 -0.0403084)
      PathPoint P4: tibia_l (0.00642904 -0.0521824 -0.029839)
    Thelen2003Muscle pect_l: max_isometric_force=798 optimal_fiber_length=0.09983874 tendon_slack_length=0.03294678
        pennation_angle_at_optimal=0
      PathPoint P1: pelvis (-0.0396891 -0.070722 -0.0415308)
      PathPoint P2: femur_l (-0.0121844 -0.0820952 -0.0285659)
    Thelen2003Muscle grac_l: max_isometric_force=486 optimal_fiber_length=0.3601486 tendon_slack_length=0.1289168
        pennation_angle_at_optimal=0.05236
      PathPoint P1: pelvis (-0.0681528 -0.109306 -0.0257288)
      ConditionalPathPoint P2: tibia_l (-0.0284699 -0.0341811 0.0379166) range=(-0.43633 0.17453)
          coordinate=knee_angle_l
      PathPoint P3: tibia_l (-0.0208194 -0.0552147 0.0359675)
      PathPoint P4: tibia_l (0.00642904 -0.0895779 0.0229067)
    Thelen2003Muscle glut_max1_l: max_isometric_force=1719 optimal_fiber_length=0.1361808 tendon_slack_length=0.1198774
        pennation_angle_at_optimal=0.087266
      PathPoint P1: pelvis (-0.110043 0.0563566 -0.0644602)
      PathPoint P2: pelvis (-0.118883 0.00110503 -0.0815882)
      PathPoint P3: femur_l (-0.0456417 -0.0247684 -0.0442602)
      PathPoint P4: femur_l (-0.0276647 -0.0565278 -0.0530671)
    Thelen2003Muscle glut_max2_l: max_isometric_force=2457 optimal_fiber_length=0.1420503 tendon_slack_length=0.1227237
        pennation_angle_at_optimal=0
      PathPoint P1: pelvis (-0.124224 0.0162071 -0.0518444)
      PathPoint P2: pelvis (-0.12671 -0.0478847 -0.0841666)
      PathPoint P3: femur_l (-0.0425457 -0.0529324 -0.0330822)
      PathPoint P4: femur_l (-0.0155801 -0.10147 -0.0473087)
    Thelen2003Muscle glut_max3_l: max_isometric_force=1656 optimal_fiber_length=0.1399013 tendon_slack_length=0.1408729
        pennation_angle_at_optimal=0.087266
      PathPoint P1: pelvis (-0.143286 -0.028915 -0.00534099)
      PathPoint P2: pelvis (-0.140799 -0.0968745 -0.0371107)
      PathPoint P3: femur_l (-0.0298619 -0.103967 -0.0152427)
      PathPoint P4: femur_l (-0.00599235 -0.141719 -0.0464055)
    Thelen2003Muscle iliacus_l: max_isometric_force=3219 optimal_fiber_length=0.09462002 tendon_slack_length=0.09462002
        pennation_angle_at_optimal=0.12217
      PathPoint P1: pelvis (-0.062066 0.0336114 -0.0786414)
      PathPoint P2: pelvis (-0.0237582 -0.0506473 -0.0746817)
      ConditionalPathPoint P3: pelvis (-0.0265208 -0.0741292 -0.0751422) range=(-1.5708 0.7854)
          coordinate=hip_flexion_l
      PathPoint P4: femur_l (0.00169783 -0.0542307 -0.00643579)
      PathPoint P5: femur_l (-0.0192754 -0.0620208 -0.0145652)
    Thelen2003Muscle psoas_l: max_isometric_force=3339 optimal_fiber_length=0.09391633 tendon_slack_length=0.1502661
        pennation_angle_at_optimal=0.13963
      PathPoint P1: pelvis (-0.0595796 0.0816803 -0.0266129)
      PathPoint P2: pelvis (-0.0219165 -0.052489 -0.0698933)
      ConditionalPathPoint P3: pelvis (-0.0265208 -0.0741292 -0.0751422) range=(-1.5708 0.7854)
          coordinate=hip_flexion_l
      PathPoint P4: femur_l (0.00159796 -0.0506353 -0.00429053)
      PathPoint P5: femur_l (-0.018776 -0.0596239 -0.0117425)
    Thelen2003Muscle quad_fem_l: max_isometric_force=1143 optimal_fiber_length=0.05509014
        tendon_slack_length=0.02448451 pennation_angle_at_optimal=0
      PathPoint P1: pelvis (-0.105254 -0.105991 -0.0478847)
      PathPoint P2: femur_l (-0.0380514 -0.0358542 -0.0413246)
    Thelen2003Muscle gem_l: max_isometric_force=492 optimal_fiber_length=0.02499369 tendon_slack_length=0.04061474
        pennation_angle_at_optimal=0
      PathPoint P1: pelvis (-0.104333 -0.0755105 -0.0657494)
      PathPoint P2: femur_l (-0.0141819 -0.00329579 -0.0500185)
    Thelen2003Muscle peri_l: max_isometric_force=1332 optimal_fiber_length=0.0252318 tendon_slack_length=0.1116022
        pennation_angle_at_optimal=0.17453
      PathPoint P1: pelvis (-0.128552 0.000276258 -0.0216402)
      PathPoint P2: pelvis (-0.109859 -0.0254157 -0.0605005)
      PathPoint P3: femur_l (-0.0147811 -0.00359541 -0.0493411)
    Thelen2003Muscle rect_fem_l: max_isometric_force=3507 optimal_fiber_length=0.1127713 tendon_slack_length=0.3066589
        pennation_angle_at_optimal=0.087266
      PathPoint P1: pelvis (-0.0271654 -0.0286387 -0.0891392)
      ConditionalPathPoint P2: femur_l (0.0333574 -0.402486 -0.00214526) range=(-2.618 -1.46) coordinate=knee_angle_l
      MovingPathPoint P3: tibia_l (0.0661741 0.0224845 -0.00140655) x_coordinate=knee_angle_l y_coordinate=knee_angle_l
          z_coordinate=knee_angle_l
        x_location: MultiplierFunction: scale=1.071506
          SimmSpline: x=(-2.0944 -2 -1.5708 -1.4575 -1.3963 -1.0472 -0.69813 -0.52639 -0.34907 -0.17453 0 0.00017453 0.00034907 0.027925 0.087266 0.17453 2.0944)
              y=(0.015581 0.017994 0.027508 0.029656 0.030762 0.036569 0.042207 0.04509 0.048391 0.05343 0.061758 0.061767 0.061776 0.063308 0.066994 0.073303 0.057348)
        y_location: MultiplierFunction: scale=1.071506
          SimmSpline: x=(-2.0944 -2 -1.5708 -1.4575 -1.3963 -1.0472 -0.69813 -0.52639 -0.34907 -0.17453 0 0.00017453 0.00034907 0.027925 0.087266 0.17453 2.0944)
              y=(0.023412 0.023761 0.025114 0.02528 0.025315 0.024918 0.024237 0.023845 0.02342 0.022764 0.020984 0.020981 0.020979 0.020522 0.019175 0.015955 -0.067377)
        z_location: MultiplierFunction: scale=1.004679
          SimmSpline: x=(-2.0944 0.1745) y=(-0.0014 -0.0014)
    Thelen2003Muscle vas_med_l: max_isometric_force=3882 optimal_fiber_length=0.0888023 tendon_slack_length=0.1257201
        pennation_angle_at_optimal=0.087266
      PathPoint P1: femur_l (0.0139821 -0.209632 -0.0212268)
      PathPoint P2: femur_l (0.0355546 -0.276547 -0.00101618)
      ConditionalPathPoint P3: femur_l (0.0369528 -0.404284 0.0141136) range=(-2.618 -1.21) coordinate=knee_angle_l
      ConditionalPathPoint P4: femur_l (0.0273651 -0.424957 0.014791) range=(-2.618 -1.7801) coordinate=knee_angle_l
      MovingPathPoint P5: tibia_l (0.0599604 0.0233503 0.0146683) x_coordinate=knee_angle_l y_coordinate=knee_angle_l
          z_coordinate=knee_angle_l
        x_location: MultiplierFunction: scale=1.071506
          SimmSpline: x=(-2.0944 -2 -1.5708 -1.4575 -1.3963 -1.0472 -0.69813 -0.52639 -0.34907 -0.17453 0 0.00017453 0.00034907 0.027925 0.087266 0.17453 2.0944)
              y=(0.009811 0.012224 0.021737 0.023885 0.02499 0.030796 0.036419 0.039287 0.042565 0.047576 0.055959 0.055968 0.055978 0.057542 0.061337 0.06795 0.062933)
        y_location: MultiplierFunction: scale=1.071506
          SimmSpline: x=(-2.0944 -2 -1.5708 -1.4575 -1.3963 -1.0472 -0.69813 -0.52639 -0.34907 -0.17453 0 0.00017453 0.00034907 0.027925 0.087266 0.17453 2.0944)
              y=(0.022415 0.022765 0.024126 0.024293 0.024329 0.023946 0.023359 0.023068 0.022834 0.022636 0.021792 0.02179 0.021789 0.021537 0.020684 0.018327 -0.06562)
        z_location: MultiplierFunction: scale=1.004679
          SimmSpline: x=(-2.0944 2.0944) y=(0.0146 0.0146)
    Thelen2003Muscle vas_int_l: max_isometric_force=4095 optimal_fiber_length=0.08683439 tendon_slack_length=0.1357411
        pennation_angle_at_optimal=0.05236
      PathPoint P1: femur_l (0.028963 -0.192155 -0.0350017)
      PathPoint P2: femur_l (0.0334573 -0.208134 -0.032179)
      ConditionalPathPoint P3: femur_l (0.0342563 -0.402486 -0.00620998) range=(-2.618 -1.42) coordinate=knee_angle_l
      MovingPathPoint P4: tibia_l (0.0661741 0.0224845 -0.00140655) x_coordinate=knee_angle_l y_coordinate=knee_angle_l
          z_coordinate=knee_angle_l
        x_location: MultiplierFunction: scale=1.071506
          SimmSpline: x=(-2.0944 -2 -1.5708 -1.4575 -1.3963 -1.0472 -0.69813 -0.52639 -0.34907 -0.17453 0 0.00017453 0.00034907 0.027925 0.087266 0.17453 2.0944)
              y=(0.015581 0.017994 0.027508 0.029656 0.030762 0.036569 0.042207 0.04509 0.048391 0.05343 0.061758 0.061767 0.061776 0.063308 0.066994 0.073303 0.057348)
        y_location: MultiplierFunction: scale=1.071506
          SimmSpline: x=(-2.0944 -2 -1.5708 -1.4575 -1.3963 -1.0472 -0.69813 -0.52639 -0.34907 -0.17453 0 0.00017453 0.00034907 0.027925 0.087266 0.17453 2.0944)
              y=(0.023412 0.023761 0.025114 0.02528 0.025315 0.024918 0.024237 0.023845 0.02342 0.022764 0.020984 0.020981 0.020979 0.020522 0.019175 0.015955 -0.067377)
        z_location: MultiplierFunction: scale=1.004679
          SimmSpline: x=(-2.0944 0.1745) y=(-0.0014 -0.0014)
    Thelen2003Muscle vas_lat_l: max_isometric_force=5613 optimal_fiber_length=0.08429256 tendon_slack_length=0.1575468
        pennation_angle_at_optimal=0.087266
      PathPoint P1: femur_l (0.00479388 -0.185164 -0.0394051)
      PathPoint P2: femur_l (0.0268657 -0.25877 -0.0461796)
      ConditionalPathPoint P3: femur_l (0.036054 -0.402486 -0.0231463) range=(-2.618 -1.21) coordinate=knee_angle_l
      ConditionalPathPoint P4: femur_l (0.0252677 -0.423759 -0.0207752) range=(-2.618 -1.92) coordinate=knee_angle_l
      MovingPathPoint P5: tibia_l (0.0642432 0.0209865 -0.0165772) x_coordinate=knee_angle_l y_coordinate=knee_angle_l
          z_coordinate=knee_angle_l
        x_location: MultiplierFunction: scale=1.071506
          SimmSpline: x=(-2.0944 -2 -1.5708 -1.4575 -1.3963 -1.0472 -0.69813 -0.52639 -0.34907 -0.17453 0 0.00017453 0.00034907 0.027925 0.087266 0.17453 2.0944)
              y=(0.01429 0.016703 0.026215 0.028362 0.029467 0.035271 0.040878 0.043729 0.04697 0.051874 0.059956 0.059965 0.059974 0.061458 0.065035 0.071187 0.058377)
        y_location: MultiplierFunction: scale=1.071506
          SimmSpline: x=(-2.0944 -2 -1.5708 -1.4575 -1.3963 -1.0472 -0.69813 -0.52639 -0.34907 -0.17453 0 0.00017453 0.00034907 0.027925 0.087266 0.17453 2.0944)
              y=(0.021532 0.021882 0.023236 0.023402 0.023437 0.023044 0.022384 0.022015 0.021636 0.021097 0.019586 0.019584 0.019582 0.01919 0.018008 0.015107 -0.065342)
        z_location: MultiplierFunction: scale=1.004679
          SimmSpline: x=(-2.0944 2.0944) y=(-0.0165 -0.0165)
    Thelen2003Muscle med_gas_l: max_isometric_force=4674 optimal_fiber_length=0.06453676 tendon_slack_length=0.419489
        pennation_angle_at_optimal=0.29671
      PathPoint P1: femur_l (-0.0189758 -0.392399 0.0265335)
      ConditionalPathPoint P2: femur_l (-0.0299617 -0.401687 0.0291304) range=(-0.7854 0.17453) coordinate=knee_angle_l
      PathPoint P3: calcn_l (0 0.031 0.0053)
    Thelen2003Muscle lat_gas_l: max_isometric_force=2049 optimal_fiber_length=0.06887186 tendon_slack_length=0.4089267
        pennation_angle_at_optimal=0.13963
      PathPoint P1: femur_l (-0.0219719 -0.394097 -0.0307112)
      ConditionalPathPoint P2: femur_l (-0.0299617 -0.401288 -0.030937) range=(-0.7854 0.17453) coordinate=knee_angle_l
      PathPoint P3: calcn_l (0 0.031 0.0053)
    Thelen2003Muscle soleus_l: max_isometric_force=10647 optimal_fiber_length=0.05395 tendon_slack_length=0.26975
        pennation_angle_at_optimal=0.43633
      PathPoint P1: tibia_l (-0.00257162 -0.164262 -0.00713322)
      PathPoint P2: calcn_l (0 0.031 0.0053)
    Thelen2003Muscle tib_post_l: max_isometric_force=4764 optimal_fiber_length=0.03311486 tendon_slack_length=0.3311486
        pennation_angle_at_optimal=0.20944
      PathPoint P1: tibia_l (-0.0100722 -0.144439 -0.00190889)
      PathPoint P2: tibia_l (-0.0154297 -0.434067 0.0230071)
      PathPoint P3: calcn_l (0.0417 0.0334 0.0286)
      PathPoint P4: calcn_l (0.0772 0.0159 0.0281)
    Thelen2003Muscle flex_dig_l: max_isometric_force=930 optimal_fiber_length=0.03544292 tendon_slack_length=0.4169755
        pennation_angle_at_optimal=0.12217
      PathPoint P1: tibia_l (-0.0088935 -0.21923 0.00180842)
      PathPoint P2: tibia_l (-0.0165012 -0.434067 0.0196917)
      PathPoint P3: calcn_l (0.0436 0.0315 0.028)
      PathPoint P4: calcn_l (0.0708 0.0176 0.0263)
      PathPoint P5: calcn_l (0.1658 -0.0081 -0.0116)
      PathPoint P6: toes_l (-0.0019 -0.0078 -0.0147)
      PathPoint P7: toes_l (0.0285 -0.0071 -0.0215)
      PathPoint P8: toes_l (0.0441 -0.006 -0.0242)
    Thelen2003Muscle flex_hal_l: max_isometric_force=966 optimal_fiber_length=0.04467937 tendon_slack_length=0.394841
        pennation_angle_at_optimal=0.17453
      PathPoint P1: tibia_l (-0.0084649 -0.25009 -0.0245142)
      PathPoint P2: tibia_l (-0.01993 -0.437067 0.0174814)
      PathPoint P3: calcn_l (0.0374 0.0276 0.0241)
      PathPoint P4: calcn_l (0.1038 0.0068 0.0256)
      PathPoint P5: calcn_l (0.1726 -0.0053 0.0269)
      PathPoint P6: toes_l (0.0155 -0.0064 0.0265)
      PathPoint P7: toes_l (0.0562 -0.0102 0.0181)
    Thelen2003Muscle tib_ant_l: max_isometric_force=2715 optimal_fiber_length=0.1040474 tendon_slack_length=0.2367609
        pennation_angle_at_optimal=0.087266
      PathPoint P1: tibia_l (0.01918 -0.174013 -0.0115538)
      PathPoint P2: tibia_l (0.0352526 -0.423352 0.0177828)
      PathPoint P3: calcn_l (0.1166 0.0178 0.0305)
    Thelen2003Muscle per_brev_l: max_isometric_force=1305 optimal_fiber_length=0.05308952 tendon_slack_length=0.1709482
        pennation_angle_at_optimal=0.087266
      PathPoint P1: tibia_l (-0.00750054 -0.283521 -0.0326521)
      PathPoint P2: tibia_l (-0.0212158 -0.448318 -0.0284324)
      PathPoint P3: tibia_l (-0.0154297 -0.460212 -0.0290352)
      PathPoint P4: calcn_l (0.0471 0.027 -0.0233)
      PathPoint P5: calcn_l (0.0677 0.0219 -0.0343)
    Thelen2003Muscle per_long_l: max_isometric_force=2829 optimal_fiber_length=0.05162157 tendon_slack_length=0.363458
        pennation_angle_at_optimal=0.17453
      PathPoint P1: tibia_l (0.000535753 -0.168012 -0.0363694)
      PathPoint P2: tibia_l (-0.0221802 -0.450568 -0.0287338)
      PathPoint P3: tibia_l (-0.0173584 -0.462784 -0.0290352)
      PathPoint P4: calcn_l (0.0438 0.023 -0.0221)
      PathPoint P5: calcn_l (0.0681 0.0106 -0.0284)
      PathPoint P6: calcn_l (0.0852 0.0069 -0.0118)
      PathPoint P7: calcn_l (0.1203 0.0085 0.0184)
    Thelen2003Muscle per_tert_l: max_isometric_force=540 optimal_fiber_length=0.08434704 tendon_slack_length=0.1067684
        pennation_angle_at_optimal=0.22689
      PathPoint P1: tibia_l (0.00107151 -0.30045 -0.0232081)
      PathPoint P2: tibia_l (0.0245375 -0.435996 -0.0159744)
      PathPoint P3: calcn_l (0.0857 0.0228 -0.0299)
    Thelen2003Muscle ext_dig_l: max_isometric_force=1536 optimal_fiber_length=0.1070506 tendon_slack_length=0.362083
        pennation_angle_at_optimal=0.13963
      PathPoint P1: tibia_l (0.00342882 -0.147975 -0.0277291)
      PathPoint P2: tibia_l (0.0309665 -0.429353 -0.00723369)
      PathPoint P3: calcn_l (0.0922 0.0388 0.0001)
      PathPoint P4: calcn_l (0.1616 0.0055 -0.013)
      PathPoint P5: toes_l (0.0003 0.0047 -0.0153)
      PathPoint P6: toes_l (0.0443 -0.0004 -0.025)
    Thelen2003Muscle ext_hal_l: max_isometric_force=486 optimal_fiber_length=0.1161281 tendon_slack_length=0.3190908
        pennation_angle_at_optimal=0.10472
      PathPoint P1: tibia_l (0.00128581 -0.189335 -0.0229067)
      PathPoint P2: tibia_l (0.0349311 -0.426995 0.00853977)
      PathPoint P3: calcn_l (0.097 0.0389 0.0211)
      PathPoint P4: calcn_l (0.1293 0.0309 0.0257)
      PathPoint P5: calcn_l (0.1734 0.0139 0.028)
      PathPoint P6: toes_l (0.0298 0.0041 0.0245)
      PathPoint P7: toes_l (0.0563 0.0034 0.0186)
    Thelen2003Muscle ercspn_r: max_isometric_force=7500 optimal_fiber_length=0.1163769 tendon_slack_length=0.02909423
        pennation_angle_at_optimal=0
      PathPoint P1: pelvis (-0.12892 0.0404258 0.0401495)
      PathPoint P2: torso (-0.0542509 0.108502 0.0237718)
    Thelen2003Muscle ercspn_l: max_isometric_force=7500 optimal_fiber_length=0.1163769 tendon_slack_length=0.02909423
        pennation_angle_at_optimal=0
      PathPoint P1: pelvis (-0.12892 0.0404258 -0.0401495)
      PathPoint P2: torso (-0.0542509 0.108502 -0.0237718)
    Thelen2003Muscle intobl_r: max_isometric_force=2700 optimal_fiber_length=0.09655195 tendon_slack_length=0.09655195
        pennation_angle_at_optimal=0
      PathPoint P1: pelvis (-0.0368344 0.0644602 0.106543)
      PathPoint P2: torso (0.0690467 0.157821 0.0147957)
    Thelen2003Muscle intobl_l: max_isometric_force=2700 optimal_fiber_length=0.09655195 tendon_slack_length=0.09655195
        pennation_angle_at_optimal=0
      PathPoint P1: pelvis (-0.0368344 0.0644602 -0.106543)
      PathPoint P2: torso (0.0690467 0.157821 -0.0147957)
    Thelen2003Muscle extobl_r: max_isometric_force=2700 optimal_fiber_length=0.1145839 tendon_slack_length=0.1336812
        pennation_angle_at_optimal=0
      PathPoint P1: pelvis (-0.0276258 -0.0585667 0.0092086)
      PathPoint P2: torso (0.0641148 0.108502 0.108502)
    Thelen2003Muscle extobl_l: max_isometric_force=2700 optimal_fiber_length=0.1145839 tendon_slack_length=0.1336812
        pennation_angle_at_optimal=0
      PathPoint P1: pelvis (-0.0276258 -0.0585667 -0.0092086)
      PathPoint P2: torso (0.0641148 0.108502 -0.108502)
  MarkerSet:
    Marker MAN: torso (0.059632 0.379741 0.000423299)
    Marker RASI: pelvis (0.0177813 0.0310712 0.11984)
    Marker LASI: pelvis (0.0190558 0.0306732 -0.115896)
    Marker SACR: pelvis (-0.163287 0.0579088 0.00403607)
    Marker RTHAP: femur_r (0.0969746 -0.187743 -0.00994324)
    Marker RTHAD: femur_r (0.073507 -0.278764 -0.0108503)
    Marker RTHLD: femur_r (0.0367367 -0.271349 0.0649553)
    Marker RTHLP: femur_r (0.0481813 -0.188636 0.0783168)
    Marker RLEPI: femur_r (-5.38629e-5 -0.410221 0.0471138)
    Marker RMEPI: femur_r (-0.00778107 -0.424609 -0.065671)
    Marker RTIAP: tibia_r (0.0231851 -0.201268 -0.0117048)
    Marker RTIAD: tibia_r (0.0204834 -0.3014 -0.00664226)
    Marker RTILAT: tibia_r (-0.0112069 -0.222579 0.0694506)
    Marker RLMAL: tibia_r (-0.015146 -0.447885 0.0533781)
    Marker RMMAL: tibia_r (0.0106844 -0.424258 -0.0339109)
    Marker RHEEL: calcn_r (-0.0119659 0.00821231 -0.0152031)
    Marker RMFS: calcn_r (0.143874 0.0544838 0.00611179)
    Marker RMFL: calcn_r (0.113089 0.0295927 0.0454582)
    Marker RTOE: calcn_r (0.250897 -0.00693035 -0.0139285)
    Marker LTHAP: femur_l (0.0995214 -0.18983 0.0121375)
    Marker LTHAD: femur_l (0.0806762 -0.279684 0.0139943)
    Marker LTHLD: femur_l (0.0321486 -0.275665 -0.0672461)
    Marker LTHLP: femur_l (0.0420512 -0.192574 -0.0778298)
    Marker LLEPI: femur_l (0.000658582 -0.41772 -0.0522212)
    Marker LMEPI: femur_l (-0.00855374 -0.425813 0.0589608)
    Marker LTIAP: tibia_l (0.0224851 -0.221876 0.00839384)
    Marker LTIAD: tibia_l (0.0174496 -0.315567 0.0126342)
    Marker LTILAT: tibia_l (-0.0111416 -0.258759 -0.0662576)
    Marker LLMAL: tibia_l (-0.00328792 -0.449021 -0.0493664)
    Marker LMMAL: tibia_l (0.00950961 -0.422913 0.0410722)
    Marker LHEEL: calcn_l (-0.0097643 0.0133907 0.0145458)
    Marker LMFS: calcn_l (0.138843 0.0569211 -0.0024406)
    Marker LMFL: calcn_l (0.109927 0.0289877 -0.0430196)
    Marker LTOE: calcn_l (0.257104 -0.00627623 0.0118998)
